*HEADING
 Beam end force (Mesh 2x16)
*NODE, NSET=ALL
   1 ,  0.00000000000000,  -0.500000000000,  0.000000
   2 ,  0.00000000000000,  0.0000000000000, 0.0000000
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*Element, type=S4R, elset=all
   1,   1,   4,  5,   2
    2,   2,   5,  6,   3
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*NSET,NSET=LOADed
49, 50, 51
*NSET,NSET=bbb
1,2,3, 4, 5, 6
*SHELL SECTION,elset=all,MATERIAL=A
0.1
*MATERIAL,NAME=A
*ELASTIC
1.2e6,0.0
*BOUNDARY
bbb,encastre
*RESTART,WRITE,FREQ=200
********************
*STEP,INC=40,NLGEOM
*STATIC,DIRECT
0.025,1.0
*controls,parameters=time incrementation
60,60,60,60
*CLOAD
LOADed,3,  1.33333333333333333
*EL PRINT,FRE=0
*NODE FILE,FRE=1,NSET=ALL
U
CF
*NODE Print,FRE=1,NSET=LOADed
U
CF
*END STEP
********************
