*HEADING
 LARGE ELASTIC DEFLECTION OF PINCHED HEMISPHERICAL SHELL
*NODE,NSET=ALL
    1,   0.000000000,  10.000000000,   0.000000000
    2,   0.980171403,   9.951847267,   0.000000000
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*Element, type=S4R, elset=all
    1,   1,   2,  19,  18
    2,   2,   3,  20,  19
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*Nset, generate,nset=set1
   1, 17,1
*Nset, generate,nset=set2
   1,273,17
*Nset, generate,nset=set3
  17,289,17
*nset, nset=LOADED
 1,17
*SHELL SECTION,ELSET=ALL,MAT=MAT
 0.04
*MATERIAL,NAME=MAT
*ELASTIC
 6.825e7,0.3
*BOUNDARY
 set2,xsymm
 set3,ysymm
 289,3
************************************************
*RESTART,WRITE,FREQ=900
*STEP,INC=40,NLGEOM
*STATIC,direct
0.025,1.0
*controls,parameters=time incrementation
200,200,200,200
*CLOAD
1,2,100.0
17,1,-100.0
*EL PRINT,FRE=0
*NODE PRINT,FRE=1,NSET=LOADED
U
CF
*NODE FILE,FRE=1,NSET=ALL
U
CF
*END STEP
************************************************
